// COMSOL Multiphysics 6.1.0.357 model "mice.mph"
// Outline of the model tree

Parameters
  pa = 0.005  // production rate constant, a
  ph = 0.2  // production rate constant, h
  ma = 0.005  // degradation rate constant, a
  mh = 0.015  // degradation rate constant, h
  Kh = 0.01  // hill constant
  k = 0.1  // regulatory constant
  l0 = 0.6  // domine length
  log_tmin = -2  // min time to be dispayed
  log_tmax = 8  // max time to be dispayed
  log_dt = 0.25  // time step
  n_mesh = 30 [s]  // number of mesh elements
  tol_abs = 0.001  // absolute tolerance
  tol_rel = 0.001  // relative tolerance
  Da = 0.005  // diffusion coefficient
  Dh = 0.2  // diffusion coefficient

Functions
  an1: Analytic | funcname = F; expr = a^2/((Kh+h)*(1+k*a^2)); args = {a, h}
  rn1: Random | nargs = 3; uniformrange = 0.1; seed = 113013

Geometry
  geom1 "Geometry 1" (2D, length unit m)
    sq1: Square | size = l0
    fin: Finalize "Form Union"

Physics
  c: CoefficientFormPDE on all domains
    dependent variable u = {a, h}
    ShapeProperty.order = 1
    EquationForm.form = Automatic
    cfeq1: CoefficientFormPDE (default)
      c = {{Da, 0, 0, Da}, {0, 0, 0, 0}, {0, 0, 0, 0}, {Dh, 0, 0, Dh}}
      f = {pa*F(a,h)-ma*a, ph*F(a,h)-mh*a}
      da = {1, 0, 0, 1}
    zflx1: ZeroFluxBoundary "Zero Flux 1" (default)
    init1: init "Initial Values 1" (default) | a = rn1(x,y,1); h = rn1(x,y,2)

Mesh
  mesh1 "Mesh 1"
    size: MeshSizeDefault | hauto = 3
    ftri1: FreeTri "Free Triangular 1" on all domains

Studies
  std1 "Study 1"
    time: Transient "Time Dependent" | tlist = 10^{range(log_tmin, log_dt, log_tmax)}

Solver configurations
  sol1 "Solution 1" (study std1)
    v1: Variables "Dependent Variables 1"
    t1: Time "Time-Dependent Solver 1" | tlist = 10^{range(log_tmin, log_dt, log_tmax)}
      dDef: Direct
      fc1: FullyCoupled | linsolver = dDef

Datasets
  dset1: Solution | solution = sol1

Plots
  pg1: PlotGroup2D "Coefficient Form PDE" | data = dset1
    surf1: Surface | expr = a